*Heading
** Job name: bilinear-test Model name: test_model
** Generated by: Abaqus/CAE 2018
*Preprint, echo=NO, model=NO, history=NO, contact=NO
**
** PARTS
**
*Part, name=HEX_BEAM
*Node
      1,           0.,          -1.
      2,           0.,  -1.32000005
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*Element, type=B21
 1,  1, 31
 2, 31, 32
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*Nset, nset=UNIT_CELL, generate
   1,  900,    1
*Elset, elset=UNIT_CELL, generate
   1,  900,    1
*Nset, nset=JOINTS
   1,   2,   4,   5,   6,   7
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*Elset, elset=JOINTS
   1,   2,   3,   4,   5,   6
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*Nset, nset=BEAMS
   2,   3,   4,   5,   6,   8
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*Elset, elset=BEAMS
  33,  34,  35,  36,  37,  38
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** Section: END_SECTION  Profile: END_PROFILE
*Beam Section, elset=JOINTS, material=ALUMINIUM, temperature=GRADIENTS, section=RECT
1., 0.071908
0.,0.,-1.
** Section: MID_SECTION  Profile: MID_PROFILE
*Beam Section, elset=BEAMS, material=ALUMINIUM, temperature=GRADIENTS, section=RECT
1., 0.0388303
0.,0.,-1.
*End Part
**
**
** ASSEMBLY
**
*Assembly, name=Assembly
**
*Instance, name=INST, part=HEX_BEAM
*End Instance
**
*Node
      1,           2.,          -2.,           0.
*Nset, nset=REF
 1,
*Nset, nset=n1, instance=INST
 15,
*Nset, nset=n2, instance=INST
 30,
*Nset, nset=n3, instance=INST
 26,
*Nset, nset=n4, instance=INST
 3,
*Nset, nset=n5, instance=INST
 27,
*Nset, nset=n6, instance=INST
 28,
** Constraint: Constraint-1
*Equation
2
n4, 1, 1.
n1, 1, -1.
** Constraint: Constraint-2
*Equation
3
n5, 1, 1.
n2, 1, -1.
REF, 1, 1.
** Constraint: Constraint-3
*Equation
3
n6, 1, 1.
n3, 1, -1.
REF, 1, 1.
** Constraint: Constraint-4
*Equation
3
n4, 2, 1.
n1, 2, -1.
REF, 2, 1.
** Constraint: Constraint-5
*Equation
3
n5, 2, 1.
n2, 2, -1.
REF, 2, 0.5
** Constraint: Constraint-6
*Equation
3
n6, 2, 1.
n3, 2, -1.
REF, 2, -0.5
** Constraint: Constraint-7
*Equation
2
n4, 6, 1.
n1, 6, -1.
** Constraint: Constraint-8
*Equation
2
n5, 6, 1.
n2, 6, -1.
** Constraint: Constraint-9
*Equation
2
n6, 6, 1.
n3, 6, -1.
*End Assembly
**
** MATERIALS
**
*Material, name=ALUMINIUM
*Elastic
70000., 0.3
*Plastic
130.,        0.
140., 0.0136054
150., 0.0272109
160., 0.0408163
170., 0.0544218
180., 0.0680272
190., 0.0816327
200., 0.0952381
210.,  0.108844
220.,  0.122449
230.,  0.136054
240.,   0.14966
250.,  0.163265
260.,  0.176871
270.,  0.190476
** ----------------------------------------------------------------
**
** STEP: Step-1
**
*Step, name=Step-1, nlgeom=NO, inc=1000
*Static
0.01, 1., 0.01, 0.01
**
** BOUNDARY CONDITIONS
**
** Name: BC-1 Type: Displacement/Rotation
*Boundary
REF, 2, 2, -0.09
**
** OUTPUT REQUESTS
**
*Restart, write, frequency=0
**
** FIELD OUTPUT: F-Output-1
**
*Output, field, variable=PRESELECT
**
** HISTORY OUTPUT: H-Output-1
**
*Output, history, variable=PRESELECT
*End Step
