*Heading
** Job name: Job-BU005 Model name: Model-1
** Generated by: Abaqus/CAE 2018
*Preprint, echo=NO, model=NO, history=NO, contact=NO
**
** PARTS
**
*Part, name=part2
*Node
      1,   4.32746267,        3.125
      2,   4.32746267,        2.875
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*Element, type=CPS3
 1, 10246,  9852, 10245
 2, 10222, 10048, 10244
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*Element, type=CPS4R
  19, 10216, 10175,   570,  9968
  20,  1118,  9968,  9816,  1117
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*Nset, nset=Set-1, generate
     1,  13701,      1
*Elset, elset=Set-1, generate
    1,  8905,     1
** Section: Section-1
*Solid Section, elset=Set-1, material=Material-1
1.,
*End Part
**
**
** ASSEMBLY
**
*Assembly, name=Assembly
**
*Instance, name=part2-1, part=part2
*End Instance
**
*Node
      1,           7.,           7.,           0.
*Node
      2, -1.73472348e-18,          4.5,           0.
*Node
      3,   1.73205101,          4.5,           0.
*Node
      4,   3.46410203,          4.5,           0.
*Node
      5,   5.19615316,          4.5,           0.
*Node
      6,   5.62916565,         3.75,           0.
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*Nset, nset=Set-8
 1,
*Nset, nset=n1a
 2,
*Nset, nset=n1b
 3,
*Nset, nset=n1c
 4,
*Nset, nset=n1d
 5,
*Nset, nset=n2a
 6,
*Nset, nset=n2b
 7,
*Nset, nset=n2c
 8,
*Nset, nset=n2d
 9,
*Nset, nset=n3a
 13,
*Nset, nset=n3b
 12,
*Nset, nset=n3c
 11,
*Nset, nset=n3d
 10,
*Nset, nset=n4a
 17,
*Nset, nset=n4b
 16,
*Nset, nset=n4c
 15,
*Nset, nset=n4d
 14,
*Nset, nset=ref
 1,
*Elset, elset=_s_Surf-1_S4, internal, instance=part2-1
 6101,
*Surface, type=ELEMENT, name=s_Surf-1
_s_Surf-1_S4, S4
*Elset, elset=_s_Surf-2_S4, internal, instance=part2-1
 4994,
*Surface, type=ELEMENT, name=s_Surf-2
_s_Surf-2_S4, S4
*Elset, elset=_s_Surf-3_S3, internal, instance=part2-1
 2764,
*Surface, type=ELEMENT, name=s_Surf-3
_s_Surf-3_S3, S3
*Elset, elset=_s_Surf-4_S4, internal, instance=part2-1
 539,
*Surface, type=ELEMENT, name=s_Surf-4
_s_Surf-4_S4, S4
*Elset, elset=_s_Surf-5_S4, internal, instance=part2-1
 486,
*Surface, type=ELEMENT, name=s_Surf-5
_s_Surf-5_S4, S4
*Elset, elset=_s_Surf-6_S4, internal, instance=part2-1
 295,
*Surface, type=ELEMENT, name=s_Surf-6
_s_Surf-6_S4, S4
*Elset, elset=_s_Surf-7_S4, internal, instance=part2-1
 1597,
*Surface, type=ELEMENT, name=s_Surf-7
_s_Surf-7_S4, S4
*Elset, elset=_s_Surf-8_S3, internal, instance=part2-1
 1401,
*Surface, type=ELEMENT, name=s_Surf-8
_s_Surf-8_S3, S3
*Elset, elset=_s_Surf-9_S4, internal, instance=part2-1
 6165,
*Surface, type=ELEMENT, name=s_Surf-9
_s_Surf-9_S4, S4
*Elset, elset=_s_Surf-10_S4, internal, instance=part2-1
 5686,
*Surface, type=ELEMENT, name=s_Surf-10
_s_Surf-10_S4, S4
*Elset, elset=_s_Surf-11_S4, internal, instance=part2-1
 8386,
*Surface, type=ELEMENT, name=s_Surf-11
_s_Surf-11_S4, S4
*Elset, elset=_s_Surf-12_S3, internal, instance=part2-1
 7915,
*Surface, type=ELEMENT, name=s_Surf-12
_s_Surf-12_S3, S3
*Elset, elset=_s_Surf-13_S4, internal, instance=part2-1
 8025,
*Surface, type=ELEMENT, name=s_Surf-13
_s_Surf-13_S4, S4
*Elset, elset=_s_Surf-14_S3, internal, instance=part2-1
 6908,
*Surface, type=ELEMENT, name=s_Surf-14
_s_Surf-14_S3, S3
*Elset, elset=_s_Surf-15_S4, internal, instance=part2-1
 3580,
*Surface, type=ELEMENT, name=s_Surf-15
_s_Surf-15_S4, S4
*Elset, elset=_s_Surf-16_S4, internal, instance=part2-1
 1345,
*Surface, type=ELEMENT, name=s_Surf-16
_s_Surf-16_S4, S4
** Constraint: Constraint-1
*Coupling, constraint name=Constraint-1, ref node=n1a, surface=s_Surf-1
*Kinematic
** Constraint: Constraint-2
*Coupling, constraint name=Constraint-2, ref node=n1b, surface=s_Surf-2
*Kinematic
** Constraint: Constraint-3
*Coupling, constraint name=Constraint-3, ref node=n1c, surface=s_Surf-3
*Kinematic
** Constraint: Constraint-4
*Coupling, constraint name=Constraint-4, ref node=n1d, surface=s_Surf-4
*Kinematic
** Constraint: Constraint-5
*Coupling, constraint name=Constraint-5, ref node=n2a, surface=s_Surf-5
*Kinematic
** Constraint: Constraint-6
*Coupling, constraint name=Constraint-6, ref node=n2b, surface=s_Surf-6
*Kinematic
** Constraint: Constraint-7
*Coupling, constraint name=Constraint-7, ref node=n2c, surface=s_Surf-7
*Kinematic
** Constraint: Constraint-8
*Coupling, constraint name=Constraint-8, ref node=n2d, surface=s_Surf-8
*Kinematic
** Constraint: Constraint-9
*Coupling, constraint name=Constraint-9, ref node=n4a, surface=s_Surf-9
*Kinematic
** Constraint: Constraint-10
*Coupling, constraint name=Constraint-10, ref node=n4b, surface=s_Surf-10
*Kinematic
** Constraint: Constraint-11
*Coupling, constraint name=Constraint-11, ref node=n4c, surface=s_Surf-11
*Kinematic
** Constraint: Constraint-12
*Coupling, constraint name=Constraint-12, ref node=n4d, surface=s_Surf-12
*Kinematic
** Constraint: Constraint-13
*Coupling, constraint name=Constraint-13, ref node=n3a, surface=s_Surf-13
*Kinematic
** Constraint: Constraint-14
*Coupling, constraint name=Constraint-14, ref node=n3b, surface=s_Surf-14
*Kinematic
** Constraint: Constraint-15
*Coupling, constraint name=Constraint-15, ref node=n3c, surface=s_Surf-15
*Kinematic
** Constraint: Constraint-16
*Coupling, constraint name=Constraint-16, ref node=n3d, surface=s_Surf-16
*Kinematic
** Constraint: Constraint-17
*Equation
2
n3a, 1, 1.
n1a, 1, -1.
** Constraint: Constraint-18
*Equation
2
n3b, 1, 1.
n1b, 1, -1.
** Constraint: Constraint-19
*Equation
2
n3c, 1, 1.
n1c, 1, -1.
** Constraint: Constraint-20
*Equation
2
n3d, 1, 1.
n1d, 1, -1.
** Constraint: Constraint-21
*Equation
3
n3a, 2, 1.
n1a, 2, -1.
ref, 2, 1.
** Constraint: Constraint-22
*Equation
3
n3b, 2, 1.
n1b, 2, -1.
ref, 2, 1.
** Constraint: Constraint-23
*Equation
3
n3c, 2, 1.
n1c, 2, -1.
ref, 2, 1.
** Constraint: Constraint-24
*Equation
3
n3d, 2, 1.
n1d, 2, -1.
ref, 2, 1.
** Constraint: Constraint-25
*Equation
3
n4a, 1, 1.
n2a, 1, -1.
ref, 1, 1.
** Constraint: Constraint-26
*Equation
3
n4b, 1, 1.
n2b, 1, -1.
ref, 1, 1.
** Constraint: Constraint-27
*Equation
3
n4c, 1, 1.
n2c, 1, -1.
ref, 1, 1.
** Constraint: Constraint-28
*Equation
3
n4d, 1, 1.
n2d, 1, -1.
ref, 1, 1.
** Constraint: Constraint-29
*Equation
2
n4a, 2, 1.
n2a, 2, -1.
** Constraint: Constraint-30
*Equation
2
n4b, 2, 1.
n2b, 2, -1.
** Constraint: Constraint-31
*Equation
2
n4c, 2, 1.
n2c, 2, -1.
** Constraint: Constraint-32
*Equation
2
n4d, 2, 1.
n2d, 2, -1.
** Constraint: Constraint-33
*Equation
2
n4a, 6, 1.
n2a, 6, -1.
** Constraint: Constraint-34
*Equation
2
n4b, 6, 1.
n2b, 6, -1.
** Constraint: Constraint-35
*Equation
2
n4c, 6, 1.
n2c, 6, -1.
** Constraint: Constraint-36
*Equation
2
n4d, 6, 1.
n2d, 6, -1.
** Constraint: Constraint-37
*Equation
2
n3a, 6, 1.
n1a, 6, -1.
** Constraint: Constraint-38
*Equation
2
n3b, 6, 1.
n1b, 6, -1.
** Constraint: Constraint-39
*Equation
2
n3c, 6, 1.
n1c, 6, -1.
** Constraint: Constraint-40
*Equation
2
n3d, 6, 1.
n1d, 6, -1.
*End Assembly
**
** MATERIALS
**
*Material, name=Material-1
*Elastic
1440., 0.3
** ----------------------------------------------------------------
**
** STEP: Step-1
**
*Step, name=Step-1, nlgeom=NO, perturbation
*Buckle
5, , 10, 30
**
** LOADS
**
** Name: Load-1   Type: Concentrated force
*Cload
Set-8, 2, -1.
**
** OUTPUT REQUESTS
**
*Restart, write, frequency=0
**
** FIELD OUTPUT: F-Output-1
**
*Output, field, variable=PRESELECT
*End Step
